**
**   Structure: heating wire above plane
**   Test objective: radiation with beam elements
**
*NODE, NSET=Nall
       1,  1.00000e+00,  0.00000e+00,  0.00000e+00
       2,  8.00000e-01,  0.00000e+00,  0.00000e+00
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*ELEMENT, TYPE=B32, ELSET=Eall
     1,     97,     99,     98
     2,     98,    101,    100
     3,    100,    103,    102
     4,    102,    105,    104
     5,    104,    107,    106
*ELEMENT, TYPE=S8, ELSET=Eall
     6,      1,      2,      3,      4,      5,      6,      7,      8
     7,      4,      3,      9,     10,      7,     11,     12,     13
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*NSET,NSET=Nwire
97,
98,
99,
100,
101,
102,
103,
104,
105,
106,
107,
*ELSET,ELSET=Ewire
1,
2,
3,
4,
5,
*ELSET,ELSET=Eplate,GENERATE
6,30
*PHYSICAL CONSTANTS,ABSOLUTE ZERO=0.,STEFAN BOLTZMANN=5.669E-8
*MATERIAL,NAME=STEEL
*DENSITY
7800.
*CONDUCTIVITY
50.
*SPECIFIC HEAT
446.
*BEAM SECTION,ELSET=Ewire,MATERIAL=STEEL,SECTION=RECT
0.01,0.01
*SHELL SECTION,ELSET=Eplate,MATERIAL=STEEL
0.01
*INITIAL CONDITIONS,TYPE=TEMPERATURE
Nall,300.
*STEP,INC=100
*HEAT TRANSFER,STEADY STATE
1.,1.
*BOUNDARY
Nwire,11,11,1000.
*RADIATE
1,R1CR,300.,1.
2,R1CR,300.,1.
3,R1CR,300.,1.
4,R1CR,300.,1.
5,R1CR,300.,1.
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30, R2CR, 300.000000, 8.000000e-01
*EL PRINT,ELSET=Eall
HFL
*END STEP
